// COMSOL Multiphysics 6.3.0.335 model "251113_TiC_FullMacro_elec.mph"
// Outline of the model tree

Parameters
  matrix = 1 [1]  // 0=without / 1=with
  electrodes = 1 [1]  // 0=none / 1=electrodes(4points) / 2=electrodes(2points)
  elec_dl = 1 [1]  // 0=none / 1=double-layer
  q_in = 6.2e-11 [m^3/s]  // Fluidic input flow rate
  disp_in = 60 [um]  // Prescribed displacement in negative z direction to apply compression
  f_in = 2e6 [N/m^2]  // Force in negative z direction to apply compression
  mat_E = 1e3 [Pa]  // Young modulus of extracellular matrix
  l_electrode = 500 [um]  // Width CC electrodes
  L_electrode = 1500 [um]  // Length CC electrodes
  side_pu = 250 [um]  // side PU electrodes
  Vin = 25 [mV]  // Excitation signal peak amplitude
  channel_h = 600 [um]  // Channel z-height
  glass_h = 1 [mm]  // Glass slide support z-thickness
  io_w = 2 [mm]  // Input/Output channels x-width (inlet outter diameter)
  io_d = 0.5 [mm]  // Input/Output connnexions round diameter (inlet inner diameter)
  chamfer = 1 [mm]  // Chamfer radius
  top_E = 750 [MPa]
  central_well = 6.94 [mm]
  pattern = 8.99 [mm]
  inlet_diameter = 2 [mm]
  TiC_channel_depth = central_well+marge
  marge = 1 [mm]
  TiC_channel_height = 0.6 [mm]
  TiC_height = 4 [mm]
  TiC_channel_width = 2*pattern-2*inlet_diameter
  pillars_diameter = 0.6 [mm]
  pillars_spacing = 1 [mm]
  TiC_depth = 15 [mm]
  TiC_width = 35 [mm]
  ID_inlet_diameter = 0.5 [mm]
  fillet = 3 [mm]  // Fillet radius
  dl_al = 30 [um]  // Double_layer total added length
  dl_vw = 1.5 [um]  // Double_layer volume width

Functions
  step1: Step | location = 1; smooth = 2
  rm1: Ramp | slope = 1/60

Common definitions
  free1: DeformingDomain on domains 3, 5-7, 10, 11, 16, 17, 20-22
  fix1: FixedBoundary on boundaries 10-13, 16, 18-22, 24, 26-32, 35, 36, 41, 42, 45, 46, 63, 64, 67, 68, 70, 71, 74, 75, 79, 82, 88, 90, 104, 107, 110, 111, 114, 115, 117, 118, 121, 122, 130, 132, 135, 136, 139, 140, 147, 148, 151-158, 161, 163-165, 167, 169

Geometry
  geom1 "Geometry 1" (3D, length unit mm)
    blk2: Block "TiC_PDMS" | size = {TiC_width, TiC_depth, TiC_height}; base = center; pos = {0, 0, TiC_height/2}
    cyl4: Cylinder "Central_cavity"
      r = central_well/2
      h = TiC_height-TiC_channel_height
      pos = {0, 0, TiC_channel_height}
    dif1: Difference | input = blk2; input2 = cyl4
    blk3: Block "Glass substrate" | size = {TiC_width, TiC_depth, glass_h}; base = center; pos = {0, 0, -glass_h/2}
    blk1: Block "Channel"
      size = {TiC_channel_width, TiC_channel_depth, TiC_channel_height}
      base = center
      pos = {0, 0, TiC_channel_height/2}
    cyl1: Cylinder "Inlet" | r = io_w/2; h = TiC_channel_height; pos = {-pattern, 0, 0}
    cyl6: Cylinder "Inlet 1" | r = io_d/2; h = TiC_height-TiC_channel_height; pos = {-pattern, 0, TiC_channel_height}
    mir1: Mirror "Outlet" | input = cyl1, cyl6; keep = on; axis = {1, 0, 0}
    wp1: WorkPlane "Connexion inlet-channel" | unite = on
      pol1: Polygon
        source = table
        table = 
          {-TiC_channel_width/2, -TiC_channel_depth/2}
          {-TiC_channel_width/2 - io_w, -io_w/2}
          {-TiC_channel_width/2 - io_w, io_w/2}
          {-TiC_channel_width/2, TiC_channel_depth/2}
      mir1: Mirror | input = pol1; keep = on; axis = {1, 0}
    ext1: Extrude | extrudefrom = faces; inputface = wp1.uni boundaries 1, 2; distance = TiC_channel_height
    uni1: Union | input = blk1, cyl1, ext1, mir1(1)
    del1: Delete "Delete Entities 1" | input = uni1(1) boundaries 5, 6, 12, 14, 19, 24, 25, 28
    fil1: Fillet3D "Fillet 1" | edge = del1(1) edges 18, 23, 26, 31; radius = fillet
    if1: If "If matrix" | condition = matrix == 1
    cyl2: Cylinder "Matrix" | r = central_well/2-0.01; h = TiC_channel_height
    endif1: EndIf "End If matrix"
    wp2: WorkPlane "Pillars" | unite = on
      c3: Circle | r = pillars_diameter/2; pos = {-central_well/2 - pillars_spacing, 0}
      c4: Circle | r = pillars_diameter/2; pos = {-3.871, 2.235}
      c5: Circle | r = pillars_diameter/2; pos = {-2.235, 3.871}
      mir1: Mirror | input = c3; keep = on; axis = {1, 0}
      mir3: Mirror | input = c4, c5; keep = on; axis = {1, 0}
      mir4: Mirror | input = c4, c5, mir3; keep = on; axis = {0, 1}
    ext2: Extrude | workplane = wp2; input = wp2; distance = TiC_channel_height
    if2: If "If electrodes" | condition = electrodes != 0
    wp3: WorkPlane "CC electrodes" | unite = on
      r1: Rectangle | size = {l_electrode, L_electrode}; base = center; pos = {2, 0}
      mir1: Mirror | input = r1; keep = on
    if3: If "If 4-point" | condition = electrodes == 1
    wp4: WorkPlane "PU electrodes" | unite = on
      sq1: Square | size = side_pu; base = center; pos = {1.5, 0}
      arr1: Array | input = sq1; size = {4, 1}; fullsize = {4, 1}; displ = {-1, 0}
    endif3: EndIf "End If 4-point"
    if4: If "If double-layer" | condition = elec_dl == 1
    wp5: WorkPlane | unite = on
      r1: Rectangle | size = {l_electrode+dl_al, L_electrode+dl_al}; base = center; pos = {2, 0}
      mir1: Mirror | input = r1; keep = on; axis = {1, 0}
    ext3: Extrude "Double_layer Extrude" | workplane = wp5; input = wp5; distance = dl_vw
    endif4: EndIf "End If double_layer"
    endif2: EndIf "End If electrodes"
    cyl5: Cylinder "Cap" | r = central_well/2-0.01; h = TiC_height; pos = {0, 0, TiC_channel_height}
    fin: Finalize "Form Union" | pairtype = contact

Materials
  mat2: Common "Glass (quartz)" on domains 1
    def: def "Basic"
      relpermeability = 1
      electricconductivity = 1e-14[S/m]
      relpermittivity = 4.2
      density = 2210[kg/m^3]
      thermalconductivity = 1.4[W/(m*K)]
      heatcapacity = 730[J/(kg*K)]
      youngsmodulus = 100e9
      poissonsratio = 0.15
    RefractiveIndex: RefractiveIndex
      n = 1.5
      ki = 0
  mat1: Common "PDMS - Polydimethylsiloxane" on domains 2, 5-7, 10-13, 16-22
    def: def "Basic"
      thermalexpansioncoefficient = 9e-4[1/K]
      heatcapacity = 1460[J/(kg*K)]
      relpermittivity = 2.75
      density = 970[kg/m^3]
      thermalconductivity = 0.16[W/(m*K)]
      electricconductivity = 1e-12
    Enu: Enu "Young's modulus and Poisson's ratio"
      E = top_E
      nu = 0.49
  mat3: Common "Culture Medium" on domains 3, 4, 23
    def: def "Basic"
      density = 1000
      dynamicviscosity = 0.001
      relpermittivity = 80
      electricconductivity = 1.5
      compressibility = 5e-10
  mat4: Common "Matrix" on domains 8
    def: def "Basic"
      density = 1050
      dynamicviscosity = 0.001
      youngsmodulus = mat_E
      poissonsratio = 0.49
      relpermittivity = 80
      electricconductivity = 1.5
      porosity = 0.73
      hydraulicpermeability = 1.5e-11
      compressibility = 5e-10
    Lame: Lame "Lamé parameters"
      lambLame = 16800
      muLame = 2800
    PoroelasticModel: PoroelasticModel "Poroelastic material"
      alphaB = 0.9
      porosity = 0.73
      hydraulicpermeability = 1.5e-11
  mat5: Common "Pt - Platinum" on boundaries 82, 92, 93, 100, 101, 107
    def: def "Basic"
      electricconductivity = 8.9e6[S/m]
      thermalexpansioncoefficient = 8.80e-6[1/K]
      heatcapacity = 133[J/(kg*K)]
      density = 21450[kg/m^3]
      thermalconductivity = 71.6[W/(m*K)]
    Enu: Enu "Young's modulus and Poisson's ratio"
      E = 168e9[Pa]
      nu = 0.38
  mat7: Common "Double Layer" on domains 14, 15
    def: def "Basic"
      density = 1000
      dynamicviscosity = 0.001
      youngsmodulus = mat_E
      poissonsratio = 0.4
      relpermittivity = 1700
      electricconductivity = 1e-12
  mat8: Common "Plastic" on domains 9
    def: def "Basic"
      density = 1240
      electricconductivity = 1e-14[S/m]
      relpermittivity = 4.2
    Enu: Enu "Young's modulus and Poisson's ratio"
      E = 10e9
      nu = 0.3

Physics
  spf: CreepingFlow on domains 3, 4, 23
    dependent variable u2 = {u2, v2, w2}
    PhysicalModelProperty.EnablePorousMediaDomains = 1
    PhysicalModelProperty.PorousWallTreatment = PorousResolvedWall
    TurbulenceModelProperty.WallTreatment = WallFunctions
    TurbulenceModelProperty.Cs = 0.01
    fp1: FluidProperties (default) | mu_init_app = spf.mu0
    init1: init "Initial Values 1" (default)
    wallbc1: WallBC "Wall 1" (default)
    inl1: InletBoundary "Inlet 1" on boundaries 17
      BoundaryCondition = FullyDevelopedFlow
      FullyDevelopedFlowOption = V0
      V0fdf = q_in
      p0avfdf = 20000
      MassFlowType = StandardFlowRate
      stdmfr = q_in
    out1: OutletBoundary "Outlet 1" on boundaries 162
      BoundaryCondition = FullyDevelopedFlow
      p0 = 20000
      NormalFlow = 1
      V0fdf = -q_in
  solid: SolidMechanics on domains 1, 2, 8, 9
    dependent variable u = {u, v, w}
    AdvancedSettings.GroupPhysOdesRc = 0
    AdvancedSettings.GroupPhysOdesAtt = 0
    AdvancedSettings.GroupPhysOdesRd = 0
    lemm1: LinearElasticModel "Linear Elastic Material 1" (default)
    free1: Free (default)
    init1: init "Initial Values 1" (default)
    fix2: Fixed "Fixed Constraint 2" on boundaries 2, 3, 6, 8, 12, 19, 20, 29, 35, 41, 45, 56, 63, 67, 71, 75, 79, 82, 92, 93, 100, 101, 104, 107, 110, 114, 118, 122, 135, 139, 147, 153, 157, 164, 170
    bndl1: BoundaryLoad (disabled) on no boundaries | pressure = 2e5; forceReferenceArea = {0, 0, -f_in}
    hmm1: HyperelasticModel "Hyperelastic Material 1" on domains 8
      MaterialModel = Ogden
      kappa = 0
      Compressibility_MooneyRivlin = CompressibleUncoupled
      Compressibility_Yeoh = CompressibleUncoupled
      Compressibility_Ogden = CompressibleUncoupled
      alphap = 8
      mup = 2800
      Compressibility_Varga = CompressibleUncoupled
      Compressibility_ArrudaBoyce = CompressibleUncoupled
      Compressibility_Gent = CompressibleUncoupled
      Compressibility_Delfino = CompressibleUncoupled
      Compressibility_ExtendedTube = CompressibleUncoupled
      vis1: Viscoelasticity on all domains
        tauv = 95.36[s]
        betavm = {0.1057, 0.4142}
        tauvm = {1.642, 11.051}
        betav = 0.4
    disp1: Displacement2 "Prescribed Displacement 1" on boundaries 60
      Direction = {prescribed, prescribed, prescribed}
      U0 = {0, 0, -disp_in*rm1(t[1/s])}
    cnt1: SolidContact "Contact 1" (disabled) on all boundaries
      pn = ((min(1e-3*(5^niterCMP),1))*solid.cnt1.E_char)/solid.hmin_dst
      tolcontact = 0.0293867725346*1e-4
      adh1: Adhesion on all boundaries | ActivationCriterion = Always
    cnt2: SolidContact "Contact 2" (disabled) on all boundaries
      pn = ((min(1e-3*(5^niterCMP),1))*solid.cnt2.E_char)/solid.hmin_dst
      tolcontact = 0.0293867725346*1e-4
      adh1: Adhesion on all boundaries | ActivationCriterion = Always
    cnt3: SolidContact "Contact 3" (disabled) on all boundaries
      pn = ((min(1e-3*(5^niterCMP),1))*solid.cnt3.E_char)/solid.hmin_dst
      tolcontact = 0.0293867725346*1e-4
      fric1: Friction on all boundaries | ContactPreviousStep = InContact
    cnt4: SolidContact "Contact 4" (disabled) on all boundaries
      pn = ((min(1e-3*(5^niterCMP),1))*solid.cnt4.E_char)/solid.hmin_dst
      tolcontact = 0.0293867725346*1e-4
    disp2: Displacement2 "Prescribed Displacement 2" on boundaries 4, 5, 9, 171
      Direction = {prescribed, prescribed, free}
    fix3: Fixed "Fixed Constraint 3" (disabled) on no boundaries
    fix4: Fixed "Fixed Constraint 4" (disabled) on edges 100, 101, 105, 106, 181, 184, 189, 194
  ec: ConductiveMedia "Electric Currents" on all domains
    dependent variable V
    cucn1: CurrentConservation (default)
    ein1: ElectricInsulation (default)
    init1: init "Initial Values 1" (default)
    term1: Terminal "Terminal 1 - CC_in" on boundaries 82 | TerminalType = Voltage; V0 = Vin; Vinit = 0[V]
    term2: Terminal "Terminal 2 - CC_ground" on boundaries 107 | TerminalType = Voltage; V0 = 0; Vinit = 0[V]
    term3: Terminal "Terminal 3 - PU_1" on boundaries 92 | Vinit = 0[V]
    term4: Terminal "Terminal 4 - PU_2" on boundaries 101 | Vinit = 0[V]
  dl2: PorousMediaFlowDarcy "Darcy's Law 2" on domains 8
    dependent variable p4
    porous1: PorousMedium (default)
      fluid1: FluidPorousMedium "Fluid 1" (default)
        fluid = dommat
        fluidType = compressible
        gasConstantType = specificGC
        Constitutiverelation = newtonian
        nonNewtonianModels = powerLaw
        gamma_ref = 1[1/s]
        gamma_lowlimit = 0.01[1/s]
        alpha = 1
        C = 4
        Twlf = 293.15[K]
        C1wlf = 8.86
        C2wlf = 51.6[K]
        T0 = 293.15[K]
        alphaT = 1
        shift_temperature = dl2.Tref
      pm1: PorousMatrixPorousMedium "Porous Matrix 1" (default)
        chip = 1e-4[1/Pa]
        permeabilityModelType = permeability
        K = 2.94e-4[m/s]
        dp = 0.5[mm]
        cf = 0.55
        bk = 1e3[Pa]
    nf1: NoFlow (default)
    init1: init "Initial Values 1" (default)
    cont1: Continuity "Continuity 1a" (disabled) on all boundaries
  tds2: DilutedSpeciesInPorousMedia "Transport of Diluted Species in Porous Media 2" on domains 3, 4, 8, 23
    dependent variable c_O2 = {c_O2, c_Glucose}
    porous1: PorousMedium (default)
      fluid1: FluidPorousMedium "Fluid 1" (default) | FluidMaterialList = mat3
      pm1: PorousMatrixPorousMedium "Porous Matrix 1" (default) | solid = dommat; rhob = 800[kg/m^3]; rhope = 1000[kg/m^3]
    nflx1: NoFlux (default)
    init1: init "Initial Values 1" (default) | initc = {0.174, 25}
    fl1: FluxBoundary "Flux 1" on all boundaries | species = {1, 1}
    cdm1: Fluid on domains 3, 4, 23
    in1: Inflow on boundaries 17 | c0 = {0.174, 25}
    out1: Outflow on boundaries 162

Multiphysics
  nsd1: NavierStokesDarcyCoupling "Free and Porous Media Flow Coupling 1" on boundaries 54, 55, 95, 97
    couplingType = Massflux
    NavierStokes_physics = spf
    Darcy_physics = dl2
  poro1: PoroelasticCoupling "Poroelasticity 1" on all domains | Solid_physics = solid; PorousMediaFlow_physics = dl2
  fsi1: FluidStructureInteractionBC "Fluid–Structure Interaction 1" on all boundaries
    Fluid_physics = spf
    Structure_physics = solid
  rfd1: ReactingFlowDS "Reacting Flow, Diluted Species 1" on all domains | Fluid_physics = spf; Species_physics = tds2

Mesh
  mesh1 "Mesh 1 (fluidics)" (physics-controlled)
  mesh2 "Mesh 2 (mechanics)" (physics-controlled)
    size: MeshSizeDefault | hauto = 7
  mesh3 "Mesh 3 (electrics)" (physics-controlled)
    size: MeshSizeDefault | hauto = 4

Studies
  std4 "Study 1 : mechanics time dependant"
    time: Transient "Time Dependent"
      tlist = range(0,15,300)
      solve for = {solid, dl2, tds2}
      disabledphysics = {spf/inl1, spf/out1}
      activateCoupling = {nsd1, off, poro1, on, fsi1, on, rfd1, on}
      mesh = {geom1, mesh2}
      pname = disp_in
      plistarr = range(0,3.0e-5,2.4e-4)
      punit = m
  std1 "Study 2 : fluidics"
    stat: Stationary
      solve for = {spf, dl2, tds2}
      activateCoupling = {nsd1, on, poro1, off, fsi1, off, rfd1, on}
      useinitsol = on
      initmethod = sol
      initstudy = std4
      initsol = sol14
      usesol = on
      notsolmethod = sol
      notstudy = std4
      notsol = sol14
      mesh = {geom1, mesh1}
      useparam = on
      pname = q_in
      plistarr = 10^{range(log10(6.2e-13),1/2,log10(6.2e-10))}
      punit = m^3/s
  std5 "Study 3 : transport of diluted species"
    time: Transient "Time Dependent"
      tlist = range(0,10,3600)
      solve for = {ec, dl2, tds2}
      activateCoupling = {nsd1, off, poro1, off, fsi1, off, rfd1, on}
      useinitsol = on
      initmethod = sol
      initstudy = std1
      usesol = on
      notsolmethod = sol
      notstudy = std1
      mesh = {geom1, mesh1}
  std3 "Study 4 : electric"
    freq: Frequency "Frequency Domain"
      plist = 10^{range(log10(100),1/2,log10(1.0e10))}
      preusesol = auto
      solve for = {ec, tds2}
      activateCoupling = {nsd1, on, poro1, on, fsi1, on, rfd1, on}

Solver configurations
  sol1 "Solution 1" (study std1)
    v1: Variables "Dependent Variables 1" | initmethod = sol; notsolmethod = sol
    s1: Stationary "Stationary Solver 1"
      fc1: FullyCoupled | initstep = 0.01; maxiter = 100
      dDef: Direct
      pDef: Parametric | pname = q_in; plistarr = 10^{range(log10(6.2e-13),1/2,log10(6.2e-10))}; punit = m^3/s
  sol13 "Solution 13" (study std3)
    v1: Variables "Dependent Variables 1"
      comp1_spatial_disp: Field "Spatial Mesh Displacement (comp1.spatial.disp)"
        scalemethod = manual
        scaleval = 6.06510915076e-05
    s1: Stationary "Stationary Solver 1"
      dDef: Direct
      p1: Parametric
        pname = freq
        plistarr = 10^{range(log10(100),1/2,log10(1.0e10))}
        punit = Hz
        pcontinuationmode = no
      se1: Segregated
        ss1: SegregatedStep "Electric Currents"
          segvar = {comp1_V, comp1_ec_term3_V0_ode, comp1_ec_term4_V0_ode}
          linsolver = i1
          subdamp = 0.8
        ss2: SegregatedStep "Spatial Frame Variables" | segvar = {comp1_spatial_disp}
      i1: Iterative | linsolver = bicgstab; nlinnormuse = on
        mg1: Multigrid
  sol14 "Solution 14" (study std4)
    v1: Variables "Dependent Variables 1" | resscalemethod = manual
      comp1_u: Field "Displacement Field (comp1.u)" | scalemethod = manual; scaleval = 1e-2*0.0294372281304
    t1: Time "Time-Dependent Solver 1"
      tlist = range(0,15,300)
      rtol = 0.001
      tstepsbdf = strict
      initialstepbdf = 0.05
      eventtol = 0.1
      stabcntrl = on
      fc1: FullyCoupled | dtech = auto; minstep = 0.5; useminsteprecovery = on
      dDef: Direct
  sol15 "Solution 15" (study std5)
    v1: Variables "Dependent Variables 1" | initmethod = sol; notsolmethod = sol
      comp1_spatial_disp: Field "Spatial Mesh Displacement (comp1.spatial.disp)"
        scalemethod = manual
        scaleval = 4.44430320567e-05
    t1: Time "Time-Dependent Solver 1" | tlist = range(0,10,3600); rtol = 0.005; maxorder = 2; stabcntrl = on
      fc1: FullyCoupled
        linsolver = d1
        maxiter = 8
        jtech = once
        stabacc = aacc
        aaccdim = 5
        aaccmix = 0.9
        aaccdelay = 1
        damp = 0.9
      d1: Direct "Direct, concentrations (tds2)" | linsolver = pardiso; pivotperturb = 1.0E-13

Datasets
  dset1: Solution | solution = sol13