// COMSOL Multiphysics 5.6.0.401 model "Géométrie complexe_5.6.mph"
// Outline of the model tree

Parameters
  h_verre = 1[mm]  // hauteur du bloc 1 en verre
  L_verre = 3[mm]  // longueur du bloc 1 en verre
  l_verre = 3[cm]  // largeur du bloc 1 en verre
  h_PDMS = 3[mm]  // hauteur du bloc 2 en PDMS
  L_PDMS = 3[mm]  // longueur du bloc 2 en PDMS
  l_PDMS = 3[cm]  // largeur du bloc 2 en PDMS
  r_tube_ext = 1[mm]  // rayon des tubes
  r_tube_int = 0.25[mm]  // rayon interieur des tubes
  h_tube = 1[mm]  // hauteur des tubes
  h_electrode = 250[pm]  // hauteur des electrodes
  L_electrode = 0.250[mm]  // longueur des electrodes
  l_electrode = 0.250[mm]  // largeur des electrodes
  alpha = 75[°]  // angle entre bloc 1, 2 et 4
  h_puit = 3[mm]  // hauteur du puit
  L_puit = 2[mm]  // longueur du puit
  l_trapeze = h_puit*tan(90[°]-alpha)  // largeur haut du trapeze
  l_haut_puit = l_haut_puit2+4*r_tube_ext  // largeur du bloc puit
  l_base_puit = l_haut_puit-(2*l_trapeze)  // largeur haut du puit du bloc
  l_haut_puit2 = 2[cm]  // largeur haut du puit du bloc 2
  l_base_puit2 = l_haut_puit2-(2*l_trapeze2)  // largeur du bloc2 puit
  l_trapeze2 = h_puit2*tan(90[°]-alpha)  // largeur haut du trapeze2
  h_puit2 = 2.5[mm]  // hauteur haut du puit
  l_tumoroide = (h_puit-h_puit2)*tan(90[°]-alpha)

Geometry
  geom1 "Geometry 1" (3D, length unit m)
    blk1: Block "Block 1_verre" | size = {l_verre, L_verre, h_verre}
    blk2: Block "Block 2_PDMS" | pos = {0, 0, h_verre}; size = {l_PDMS, L_PDMS, h_PDMS}
    hex2: Hexahedron "Hexahedron 2_Tumoroide+milieu de culture+PDMS"
      p = 
        {((l_PDMS-l_haut_puit)/2)+l_trapeze, ((l_PDMS-l_haut_puit)/2)+l_trapeze, (((l_PDMS-l_haut_puit)/2)+l_trapeze)+l_base_puit, (((l_PDMS-l_haut_puit)/2)+l_trapeze)+l_base_puit, ((l_PDMS-l_haut_puit2)/2)-2*r_tube_ext, ((l_PDMS-l_haut_puit2)/2)-2*r_tube_ext, ((l_PDMS-l_haut_puit2)/2)+2*l_trapeze2+l_base_puit2+2*r_tube_ext, ((l_PDMS-l_haut_puit2)/2)+2*l_trapeze2+l_base_puit2+2*r_tube_ext}
        {(L_PDMS-L_puit)/2, ((L_PDMS-L_puit)/2)+L_puit, ((L_PDMS-L_puit)/2)+L_puit, (L_PDMS-L_puit)/2, (L_PDMS-L_puit)/2, ((L_PDMS-L_puit)/2)+L_puit, ((L_PDMS-L_puit)/2)+L_puit, (L_PDMS-L_puit)/2}
        {h_verre, h_verre, h_verre, h_verre, h_verre+h_puit, h_verre+h_puit, h_verre+h_puit, h_verre+h_puit}
    dif1: Difference | input = blk2; input2 = hex2
    blk3: Block "Block 3_PDMS" | pos = {0, 0, (h_verre+(h_PDMS-h_puit))+h_puit}; size = {l_PDMS, L_PDMS, h_PDMS}
    hex3: Hexahedron
      p = 
        {((l_PDMS-l_haut_puit2)/2)+l_trapeze2, ((l_PDMS-l_haut_puit2)/2)+l_trapeze2, (((l_PDMS-l_haut_puit2)/2)+l_trapeze2)+l_base_puit2, (((l_PDMS-l_haut_puit2)/2)+l_trapeze2)+l_base_puit2, ((l_PDMS-l_haut_puit2)/2), ((l_PDMS-l_haut_puit2)/2), ((l_PDMS-l_haut_puit2)/2)+2*l_trapeze2+l_base_puit2, ((l_PDMS-l_haut_puit2)/2)+2*l_trapeze2+l_base_puit2}
        {(L_PDMS-L_puit)/2, ((L_PDMS-L_puit)/2)+L_puit, ((L_PDMS-L_puit)/2)+L_puit, (L_PDMS-L_puit)/2, (L_PDMS-L_puit)/2, ((L_PDMS-L_puit)/2)+L_puit, ((L_PDMS-L_puit)/2)+L_puit, (L_PDMS-L_puit)/2}
        {h_verre+(h_PDMS-h_puit2), h_verre+(h_PDMS-h_puit2), h_verre+(h_PDMS-h_puit2), h_verre+(h_PDMS-h_puit2), (h_verre+(h_PDMS-h_puit))+h_puit, (h_verre+(h_PDMS-h_puit))+h_puit, (h_verre+(h_PDMS-h_puit))+h_puit, (h_verre+(h_PDMS-h_puit))+h_puit}
    cyl1: Cylinder
      pos = {((l_PDMS-l_haut_puit2)/2)-r_tube_ext, L_PDMS/2, (h_verre+(h_PDMS-h_puit))+h_puit}
      r = r_tube_ext
      h = h_PDMS+h_tube
    cyl2: Cylinder
      pos = {((l_PDMS-l_haut_puit2)/2)+2*l_trapeze2+l_base_puit2+r_tube_ext, L_PDMS/2, (h_verre+(h_PDMS-h_puit))+h_puit}
      r = r_tube_ext
      h = h_PDMS+h_tube
    cyl3: Cylinder "Tube_Inlet"
      pos = {((l_PDMS-l_haut_puit2)/2)-r_tube_ext, L_PDMS/2, (h_verre+(h_PDMS-h_puit))+h_puit}
      r = r_tube_int
      h = h_PDMS+h_tube
    cyl4: Cylinder "Tube_Outlet"
      pos = {((l_PDMS-l_haut_puit2)/2)+2*l_trapeze2+l_base_puit2+r_tube_ext, L_PDMS/2, (h_verre+(h_PDMS-h_puit))+h_puit}
      r = r_tube_int
      h = h_PDMS+h_tube
    dif2: Difference | input = blk3, cyl1, cyl2; input2 = cyl3, cyl4
    hex1: Hexahedron "Tumoroide"
      p = 
        {((l_PDMS-l_haut_puit)/2)+l_trapeze, ((l_PDMS-l_haut_puit)/2)+l_trapeze, (((l_PDMS-l_haut_puit)/2)+l_trapeze)+l_base_puit, (((l_PDMS-l_haut_puit)/2)+l_trapeze)+l_base_puit, ((l_PDMS-l_haut_puit)/2)+l_trapeze-l_tumoroide, ((l_PDMS-l_haut_puit)/2)+l_trapeze-l_tumoroide, (((l_PDMS-l_haut_puit)/2)+l_trapeze)+l_base_puit+l_tumoroide, (((l_PDMS-l_haut_puit)/2)+l_trapeze)+l_base_puit+l_tumoroide}
        {(L_PDMS-L_puit)/2, ((L_PDMS-L_puit)/2)+L_puit, ((L_PDMS-L_puit)/2)+L_puit, (L_PDMS-L_puit)/2, (L_PDMS-L_puit)/2, ((L_PDMS-L_puit)/2)+L_puit, ((L_PDMS-L_puit)/2)+L_puit, (L_PDMS-L_puit)/2}
        {h_verre, h_verre, h_verre, h_verre, h_verre+(h_puit-h_puit2), h_verre+(h_puit-h_puit2), h_verre+(h_puit-h_puit2), h_verre+(h_puit-h_puit2)}
    wp1: WorkPlane (disabled) | quickplane = xz; quicky = L_PDMS/2; quickz = L_PDMS/2; unite = on
    wp2: WorkPlane (disabled) | quickz = h_verre; unite = on
      sq1: Square | pos = {l_base_puit/5+(l_PDMS-l_base_puit)/2, L_verre/2}; size = 250e-6
      arr1: Array | input = sq1; size = {2, 1}; fullsize = {2, 1}; displ = {3*4.5e-3, 0}
    fin: Finalize "Form Union"

Materials
  mat1: Common "Silica glass" on domains 1
    def "Basic"
      relpermeability = 1
      electricconductivity = 1e-14[S/m]
      thermalexpansioncoefficient = 0.55e-6[1/K]
      heatcapacity = 703[J/(kg*K)]
      relpermittivity = 3.75
      density = 2203[kg/m^3]
      thermalconductivity = 1.38[W/(m*K)]
    Enu "Young's modulus and Poisson's ratio"
      youngsmodulus = 73.1e9[Pa]
      poissonsratio = 0.17
    RefractiveIndex
      n = 1.45
      ki = 0
  mat2: Common "Tumoroïde" on domains 6
    def "Basic"
      relpermittivity = 81
      electricconductivity = 5.5e-6[S/m]
  mat3: Common "PDMS - Polydimethylsiloxane" on domains 2-5, 7-9
    def "Basic"
      thermalexpansioncoefficient = 9e-4[1/K]
      heatcapacity = 1460[J/(kg*K)]
      relpermittivity = 2.75
      density = 970[kg/m^3]
      thermalconductivity = 0.16[W/(m*K)]
      electricconductivity = 1e-14
    Enu "Young's modulus and Poisson's ratio"
      youngsmodulus = 750[kPa]
      poissonsratio = 0.49
  mat4: Common "Au - Gold" on no boundaries
    def "Basic"
      electricconductivity = 45.6e6[S/m]
      thermalexpansioncoefficient = 14.2e-6[1/K]
      heatcapacity = 129[J/(kg*K)]
      density = 19300[kg/m^3]
      thermalconductivity = 317[W/(m*K)]
    Enu "Young's modulus and Poisson's ratio"
      youngsmodulus = 70e9[Pa]
      poissonsratio = 0.44

Physics
  ec: ConductiveMedia "Electric Currents" on all domains
    dependent variable V
    cucn1: CurrentConservation (default)
    ein1: ElectricInsulation (default)
    init1: init "Initial Values 1" (default)
    term1: Terminal on no boundaries | TerminalType = Voltage; V0 = 0.025
    gnd1: Ground on no boundaries

Mesh
  mesh1 "Mesh 1" (physics-controlled)

Studies
  std1 "Study 1"
    freq: Frequency "Frequency Domain"
      plist = {1000, 2000, 3000, 4000, 5000, 6000, 7000, 8000, 9000, 10000, 20000, 30000, 40000, 50000, 60000, 70000, 80000, 90000, 100000, 200000, 300000, 400000, 500000, 600000, 700000, 800000, 900000}
      loadparameters = C:\Users\enzo3\Documents\BIOCAD-2_vsnz\freq.txt