// COMSOL Multiphysics 6.3.0.335 model "electrical_circuit.mph"
// Outline of the model tree

Geometry
  geom1 "Geometry 1" (3D, length unit µm)
    fin: Finalize "Form Union"

Physics
  cir: Circuit "Electrical Circuit"
    dependent variable voltages
    gnd1: GroundNode
    C1: Capacitor | C = 10000000[nF]; Connections = {1, 0}
    R1: Resistor (disabled) | Connections = {1, 0}
    V1: VoltageSource | Connections = {1, 0}; sourceType = AC; value = 0.025[V]

Mesh
  mesh1 "Mesh 1" (physics-controlled)

Studies
  std1 "Study 1"
    freq: Frequency "Frequency Domain" | plist = 10^{range(log10(1000),1/9,log10(1.0e12))}

Solver configurations
  sol1 "Solution 1" (study std1)
    v1: Variables "Dependent Variables 1"
    s1: Stationary "Stationary Solver 1"
      dDef: Direct
      fcDef: FullyCoupled
      p1: Parametric

Datasets
  dset1: Solution | solution = sol1

Plots
  pg1: PlotGroup1D "1D Plot Group 1" | data = dset1
    glob1: Global | data = dset1; expr = cir.V1.v/cir.C1.i; unit = Ω