// COMSOL Multiphysics 6.3.0.290 model "geometry_finale_mph.mph"
// Outline of the model tree

Parameters
  sig_elec = 1e7  // Conductivité de l'électrode
  eps_elec = 1  // Permittivité de l'électrode
  sig_med = 1.5  // Conductivité du milieu
  eps_med = 80  // Permittivité du milieu
  v_in = 0.025  // Tension d'entrée

Selections
  sel1: Explicit "MilOrg" on domains 2
  sel2: Explicit "Electrode1" on domains 3
  sel3: Explicit "Electrode2" on domains 1

Geometry
  geom1 "Géométrie 1" (3D, length unit µm)
    blk1: Block "Bioreactor" | size = {200, 80, 100}; base = center
    blk2: Block "Electrode_1" | size = {10, 80, 100}; base = center; pos = {-95, 0, 0}
    blk3: Block "Electrode_2" | size = {10, 80, 100}; base = center; pos = {95, 0, 0}
    pt1: Point "Pt_electrode_1" | p = {95, , 0}
    pt2: Point "Pt_electrode_2" | p = {-95, , 0}
    fin: Finalize "Constituer une union"

Materials
  mat1: Common "Electrode" on domains 1, 3
    def: def "Basique"
      electricconductivity = sig_elec
      relpermittivity = eps_elec
  mat2: Common "Culture_medium" on domains 2
    def: def "Basique"
      electricconductivity = sig_med
      relpermittivity = eps_med

Physics
  ec: ConductiveMedia "Courants électriques" on domains 1-3
    dependent variable V
    cucn1: CurrentConservation "Conservation du courant 1" (default)
    ein1: ElectricInsulation "Isolation électrique 1" (default)
    init1: init "Valeurs initiales 1" (default)
    term2: DomainTerminal "Terminal 1" on domains 1 | TerminalName = 1; TerminalType = Voltage; V0 = v_in
    term3: DomainTerminal "Mass 1" on domains 3 | TerminalType = Voltage; V0 = 0

Mesh
  mesh1 "Maillage 1" (physics-controlled)

Studies
  std1 "Etude 1"
    freq: Frequency "Domaine fréquentiel" | plist = 10^{range(log10(1),1/9,log10(1.0e11))}

Solver configurations
  sol1 "Solution 1" (study std1)
    v1: Variables "Dependent Variables 1"
    s1: Stationary "Stationary Solver 1" | linpmethod = sol
      p1: Parametric | pname = freq; plistarr = 10^{range(log10(1),1/9,log10(1.0e11))}; punit = Hz; pcontinuationmode = no
      fc1: FullyCoupled | linsolver = i1
      i1: Iterative | linsolver = bicgstab; nlinnormuse = on
        mg1: Multigrid

Datasets
  dset1: Solution | solution = sol1

Derived values
  gev1: EvalGlobal "Evaluation globale 1"
    data = dset1
    table = tbl1
    expr = {abs(-1/ec.Y11), arg(-1/ec.Y11)*180/pi, real(-1/ec.Y11), imag(-1/ec.Y11), 20*log10(abs(1/ec.Y11))}
    unit = {Ω, rad, Ω, Ω, }
    descr = {Module de Z (Ohm), Phase de Z (deg), Re(Z), Im(Z), }

Tables
  tbl1: Table
    // Evaluation globale 1
    freq (Hz) | Module de Z (Ohm) (Ω) | Phase de Z (deg) (rad) | Re(Z) (Ω) | Im(Z) (Ω) | 20*log10(abs(1/ec.Y11))
    1000 | 297564 | 0.00337241 | 297564 | 17.5145 | 109.472
    1291.55 | 297564 | 0.00435564 | 297564 | 22.6209 | 109.472
    1668.1 | 297564 | 0.00562552 | 297564 | 29.216 | 109.472
    2154.43 | 297564 | 0.00726564 | 297564 | 37.7338 | 109.472
    2782.56 | 297564 | 0.00938394 | 297564 | 48.7352 | 109.472
    3593.81 | 297564 | 0.0121198 | 297564 | 62.9439 | 109.472
    4641.59 | 297564 | 0.0156533 | 297564 | 81.2951 | 109.472
    5994.84 | 297564 | 0.0202171 | 297564 | 104.997 | 109.472
    7742.64 | 297563 | 0.0261114 | 297563 | 135.608 | 109.472
    10000 | 297564 | 0.0337241 | 297564 | 175.145 | 109.472
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
Plots
  pg2: PlotGroup1D "1D Plot Group 2" | data = dset1
    glob1: Global | expr = 20*log10(abs(1/ec.Y11)); descr = Module de l'Impédance (dB)
    glob2: Global | expr = arg(1/ec.Y11)*180/pi; descr = Phase (degrés)
  pg3: PlotGroup1D "1D Plot Group 3" | data = dset1
    glob3: Global | expr = -imag(conj(-1/ec.Y11)); xdata = expr; xdataexpr = real(conj(-1/ec.Y11))