// COMSOL Multiphysics 6.3.0.335 model "geometry_finale_mph_capa_6.3_v4.mph"
// Outline of the model tree

Selections
  sel1: Explicit "Electrode_1" on boundaries 1 | angletol = 0.0872664625997
  sel2: Explicit "Electrode_2" on boundaries 8 | angletol = 0.0872664625997

Geometry
  geom1 "Geometry 1" (3D, length unit m)
    blk1: Block "Bioreactor" | size = {200e-6, 80e-6, 100e-6}; base = center
    pt1: Point "Pt_bioreactor"
    pt2: Point "Pt_electrode_1" | p = {-100e-6, , }
    pt3: Point "Pt_electrode_2" | p = {100e-6, , }
    wp1: WorkPlane "Electrode_1" | quickplane = yz; quickx = -100e-6; unite = on; workplane3d = on
      pol1: Polygon | source = table; table = {{-2.0E-5, -2.5E-5}, {-2.0E-5, 2.5E-5}, {2.0E-5, 2.5E-5}, {2.0E-5, -2.5E-5}}
    wp2: WorkPlane "Electrode_2" | quickplane = yz; quickx = 100e-6; unite = on; workplane3d = on
      pol1: Polygon | source = table; table = {{-2.0E-5, -2.5E-5}, {-2.0E-5, 2.5E-5}, {2.0E-5, 2.5E-5}, {2.0E-5, -2.5E-5}}
    fin: Finalize "Form Union"

Materials
  mat1: Common "Electrode" on no domains
    def: def "Basic"
      electricconductivity = 1e7
      relpermittivity = 10
  mat2: Common "Culture Medium" on domains 1
    def: def "Basic"
      electricconductivity = 1e-1
      relpermittivity = 10

Physics
  ec: ConductiveMedia "Electric Currents" on all domains
    dependent variable V
    cucn1: CurrentConservation (default)
    ein1: ElectricInsulation (default)
    init1: init "Initial Values 1" (default)
    gnd1: Ground on boundaries 8
    term1: Terminal on boundaries 5 | TerminalType = Voltage; V0 = 0.025; Vinit = 0[V]

Mesh
  mesh1 "Mesh 1" (physics-controlled)

Studies
  std1 "Study 1"
    freq: Frequency "Frequency Domain"
      plist = {1000, 2000, 3000, 4000, 5000, 6000, 7000, 8000, 9000, 10000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}
      loadparameters = C:\Users\enzo3\OneDrive\Bureau\BIOCAD-2_vsnz\freq.txt

Solver configurations
  sol1 "Solution 1" (study std1)
    v1: Variables "Dependent Variables 1"
    s1: Stationary "Stationary Solver 1"
      p1: Parametric
        pname = freq
        plistarr = 1000 2000 3000 4000 5000 6000 7000 8000 9000 10000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
        punit = Hz
        pcontinuationmode = no
      fc1: FullyCoupled
      i1: Iterative | linsolver = bicgstab; nlinnormuse = on
        mg1: Multigrid

Datasets
  dset1: Solution | solution = sol1

Derived values
  gev1: EvalGlobal "Global Evaluation 1" | data = dset1; table = tbl2; expr = 1/ec.Y11; unit = Ω

Tables
  tbl2: Table
    // Global Evaluation 1
    freq (Hz) | abs(1/ec.Y11) (Ω) | abs(1/ec.Y11) (Ω) | 1/ec.Y11 (Ω) | 1/ec.Y11 (Ω)
    1000 | 9109.93 | 9109.93 | 9109.93-0.016416i | 9109.6-0.000205185i
    2000 | 9109.93 | 9109.93 | 9109.93-0.032832i | 9109.6-0.00041037i
    3000 | 9109.93 | 9109.93 | 9109.93-0.0492479i | 9109.6-0.000615555i
    4000 | 9109.93 | 9109.93 | 9109.93-0.0656639i | 9109.6-0.000820739i
    5000 | 9109.93 | 9109.93 | 9109.93-0.0820799i | 9109.6-0.00102592i
    6000 | 9109.93 | 9109.93 | 9109.93-0.0984959i | 9109.6-0.00123111i
    7000 | 9109.93 | 9109.93 | 9109.93-0.114912i | 9109.6-0.00143629i
    8000 | 9109.93 | 9109.93 | 9109.93-0.131328i | 9109.6-0.00164148i
    9000 | 9109.93 | 9109.93 | 9109.93-0.147744i | 9109.6-0.00184666i
    10000 | 9109.93 | 9109.93 | 9109.93-0.16416i | 9109.6-0.00205185i
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
Plots
  pg1: PlotGroup3D "Electric Potential (ec)" | data = dset1
    mslc1: Multislice | expr = V
  pg2: PlotGroup1D "1D Plot Group 2" | data = dset1
    tblp1: Table "Table Graph 1" | table = tbl2
  pg3: PlotGroup3D "3D Plot Group 3" | data = dset1
    iso1: Isosurface | expr = ec.Jx; descr = Current density, x component