// COMSOL Multiphysics 6.2.0.415 model "geometry_mph.mph"
// Outline of the model tree

Geometry
  geom1 "Géométrie 1" (3D, length unit µm)
    blk1: Block "Bioreactor" | base = center; size = {200, 80, 100}
    blk2: Block "Electrode_1" | pos = {-95, 0, 0}; base = center; size = {10, 80, 100}
    blk3: Block "Electrode_2" | pos = {95, 0, 0}; base = center; size = {10, 80, 100}
    pt1: Point "Pt_bioreactor"
    pt2: Point "Pt_electrode_1" | p = {-95, , 0}
    pt3: Point "Pt_electrode_2" | p = {95, , 0}
    fin: Finalize "Constituer une union"

Materials
  mat1: Common "Electrode" on domains 1, 3
    def "Basique"
      electricconductivity = 1e7
      relpermittivity = 1
  mat2: Common "Culture_medium" on domains 2
    def "Basique"
      electricconductivity = 1e-5
      relpermittivity = 1

Physics
  ec: ConductiveMedia "Courants électriques" on all domains
    dependent variable V
    cucn1: CurrentConservation "Conservation du courant 1" (default)
    ein1: ElectricInsulation "Isolation électrique 1" (default)
    init1: init "Valeurs initiales 1" (default)
    gnd1: Ground "Masse 1" on boundaries 16
    term1: Terminal on boundaries 1 | TerminalType = Voltage; V0 = 0.025

Mesh
  mesh1 "Maillage 1" (physics-controlled)

Studies
  std1 "Etude 1"
    freq: Frequency "Domaine fréquentiel"
      plist = {1000, 2000, 3000, 4000, 5000, 6000, 7000, 8000, 9000, 10000, 20000, 30000}
      loadparameters = C:\Users\Vincent Senez\BIOCAD-2_vsnz\freq.txt

Solver configurations
  sol1 "Solution 1" (study std1)
    v1: Variables "Variables dépendantes 1"
    s1: Stationary "Solveur stationnaire 1"
      p1: Parametric "Paramétrique 1"
        pname = freq
        plistarr = 1000 2000 3000 4000 5000 6000 7000 8000 9000 10000 20000 30000
        punit = Hz
        pcontinuationmode = no
      fc1: FullyCoupled "Couplage fort 1"
      i1: Iterative "Itératif 1" | linsolver = bicgstab; nlinnormuse = on
        mg1: Multigrid "Multigrilles 1"

Datasets
  dset1: Solution | solution = sol1