// COMSOL Multiphysics 5.6.0.401 model "geometry_finale_mph_5.6.mph"
// Outline of the model tree

Geometry
  geom1 "Geometry 1" (3D, length unit m)
    blk1: Block "Bioreactor" | base = center; size = {200e-6, 80e-6, 100e-6}
    blk2: Block "Electrode_1" | pos = {-95e-6, 0, 0}; base = center; size = {10e-6, 80e-6, 100e-6}
    blk3: Block "Electrode_2" | pos = {95e-6, 0, 0}; ax2 = {0.0, 0.0}; base = center; size = {10e-6, 80e-6, 100e-6}
    pt1: Point "Pt_bioreactor"
    pt2: Point "Pt_electrode_1" | p = {-95e-6, , }
    pt3: Point "Pt_electrode_2" | p = {95e-6, , }
    wp1: WorkPlane (disabled) | quickplane = yz; quickx = -100; unite = on
      r1: Rectangle (disabled) | base = center; size = {80, 100}
    wp2: WorkPlane (disabled) | quickplane = yz; quickx = 100; unite = on
      r1: Rectangle (disabled) | base = center; size = {80, 100}
    fin: Finalize "Form Union"

Materials
  mat1: Common "Electrode" on domains 1, 3
    def "Basic"
      electricconductivity = 1e7
      relpermittivity = 0
  mat2: Common "Culture Medium" on domains 2
    def "Basic"
      electricconductivity = 1e-1
      relpermittivity = 0

Physics
  ec: ConductiveMedia "Electric Currents" on all domains
    dependent variable V
    PortSweepSettings.useSweep = 0
    PortSweepSettings.zref = 50[ohm]
    cucn1: CurrentConservation (default)
    ein1: ElectricInsulation (default)
    init1: init "Initial Values 1" (default)
    gnd1: Ground on boundaries 11
    term1: Terminal on boundaries 1 | TerminalType = Voltage; V0 = 0.025

Mesh
  mesh1 "Mesh 1" (physics-controlled)

Studies
  std1 "Study 1"
    freq: Frequency "Frequency Domain"
      plist = {1000, 2000, 3000, 4000, 5000, 6000, 7000, 8000, 9000, 10000, 20000, 30000, 40000, 50000, 60000, 70000, 80000, 90000, 100000, 200000, 300000, 400000, 500000, 600000, 700000, 800000, 900000}
      loadparameters = C:\Users\enzo3\OneDrive\Bureau\BIOCAD-2_vsnz\freq.txt
      preusesol = no

Solver configurations
  sol1 "Solution 1" (study std1)
    v1: Variables "Dependent Variables 1"
    s1: Stationary "Stationary Solver 1"
      p1: Parametric
        pname = freq
        plistarr = 1000 2000 3000 4000 5000 6000 7000 8000 9000 10000 20000 30000 40000 50000 60000 70000 80000 90000 100000 200000 300000 400000 500000 600000 700000 800000 900000
        punit = Hz
        pcontinuationmode = no
      fc1: FullyCoupled | linsolver = i1
      i1: Iterative | linsolver = bicgstab; nlinnormuse = on
        mg1: Multigrid

Datasets
  dset1: Solution | solution = sol1

Derived values
  gev1: EvalGlobal "Global Evaluation 1" | data = dset1; table = tbl2; expr = 1/ec.Y11

Tables
  tbl2: Table
    // Global Evaluation 1
    freq (Hz) | abs(1/ec.Y11) (Ω) | abs(1/ec.Y11) (Ω) | 1/ec.Y11 (Ω) | 1/ec.Y11 (Ω)
    1000 | 9109.93 | 9109.93 | 9109.93-0.016416i | 9109.6-0.000205185i
    2000 | 9109.93 | 9109.93 | 9109.93-0.032832i | 9109.6-0.00041037i
    3000 | 9109.93 | 9109.93 | 9109.93-0.0492479i | 9109.6-0.000615555i
    4000 | 9109.93 | 9109.93 | 9109.93-0.0656639i | 9109.6-0.000820739i
    5000 | 9109.93 | 9109.93 | 9109.93-0.0820799i | 9109.6-0.00102592i
    6000 | 9109.93 | 9109.93 | 9109.93-0.0984959i | 9109.6-0.00123111i
    7000 | 9109.93 | 9109.93 | 9109.93-0.114912i | 9109.6-0.00143629i
    8000 | 9109.93 | 9109.93 | 9109.93-0.131328i | 9109.6-0.00164148i
    9000 | 9109.93 | 9109.93 | 9109.93-0.147744i | 9109.6-0.00184666i
    10000 | 9109.93 | 9109.93 | 9109.93-0.16416i | 9109.6-0.00205185i
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
Plots
  pg1: PlotGroup3D "Electric Potential (ec)" | data = dset1
    mslc1: Multislice | expr = V
  pg2: PlotGroup1D "1D Plot Group 2" | data = dset1
    tblp1: Table "Table Graph 1" | table = tbl2
  pg3: PlotGroup3D "3D Plot Group 3" | data = dset1
    iso1: Isosurface | expr = ec.Jx; descr = Current density, x component