// COMSOL Multiphysics 5.6.0.341 model "geometry_finale_mph_capa_5.6bis.mph"
// Outline of the model tree

Geometry
  geom1 "Geometry 1" (3D, length unit m)
    blk1: Block "Bioreactor_1" | pos = {-45e-6, 0, 0}; base = center; size = {90e-6, 80e-6, 100e-6}
    blk2: Block "Electrode_1" | pos = {-95e-6, 0, 0}; base = center; size = {10e-6, 80e-6, 100e-6}
    blk3: Block "Electrode_2" | pos = {95e-6, 0, 0}; ax2 = {0.0, 0.0}; base = center; size = {10e-6, 80e-6, 100e-6}
    pt1: Point "Pt_bioreactor"
    pt2: Point "Pt_electrode_1" | p = {-95e-6, , }
    pt3: Point "Pt_electrode_2" | p = {0.000095, , }
    blk4: Block "Bioreactor_2" | pos = {+45e-6, 0, 0}; base = center; size = {90e-6, 80e-6, 100e-6}
    uni1: Union "Bioreactor" | input = blk1, blk4; intbnd = off; face = all
    fin: Finalize "Form Union"

Materials
  mat1: Common "Electrode" on domains 1, 3
    def "Basic"
      electricconductivity = 1e5
      relpermittivity = 1
  mat2: Common "Culture Medium" on domains 2
    def "Basic"
      electricconductivity = 1e-4
      relpermittivity = 10

Physics
  ec: ConductiveMedia "Electric Currents" on all domains
    dependent variable V
    cucn1: CurrentConservation (default)
    ein1: ElectricInsulation (default)
    init1: init "Initial Values 1" (default)
    gnd1: Ground on boundaries 20
    term1: Terminal on boundaries 1 | TerminalType = Voltage; V0 = 0.025

Mesh
  mesh1 "Mesh 1" (physics-controlled)

Studies
  std1 "Study 1"
    freq: Frequency "Frequency Domain" | plist = 10^{range(log10(100),1/2,log10(1.0e10))}; preusesol = no

Solver configurations
  sol1 "Solution 1" (study std1)
    v1: Variables "Dependent Variables 1"
    s1: Stationary "Stationary Solver 1"
      p1: Parametric
        pname = freq
        plistarr = 10^{range(log10(100),1/2,log10(1.0e10))}
        punit = Hz
        pcontinuationmode = no
      fc1: FullyCoupled
      i1: Iterative | linsolver = bicgstab; nlinnormuse = on
        mg1: Multigrid

Datasets
  dset1: Solution | solution = sol1

Derived values
  gev1: EvalGlobal "Global Evaluation 1" | data = dset1; table = tbl2; expr = 20*log(abs(1/ec.Y11))

Tables
  tbl2: Table
    // Global Evaluation 1
    freq (Hz) | abs(1/ec.Y11) (Ω) | 20*abs(1/ec.Y11) (Ω) | 20*log(abs(1/ec.Y11))
    100 | 20539.2 | 410784 | 198.602
    316.228 | 20539.2 | 410784 | 198.602
    1000 | 20539.2 | 410784 | 198.602
    3162.28 | 20539.2 | 410784 | 198.602
    10000 | 20539.2 | 410784 | 198.602
    31622.8 | 20539.2 | 410784 | 198.602
    100000 | 20539.2 | 410784 | 198.602
    316228 | 20539.2 | 410784 | 198.602
    1e+06 | 20539.2 | 410784 | 198.602
    3.16228e+06 | 20539.2 | 410783 | 198.602
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
Plots
  pg2: PlotGroup1D "1D Plot Group 2" | data = dset1
    tblp1: Table "Table Graph 1" | table = tbl2; plotcolumninput = manual