// COMSOL Multiphysics 6.2.0.415 model "geometry_test_remi_eugenie_sans_cellule_7.mph"
// Outline of the model tree

Geometry
  geom1 "Géométrie 1" (3D, length unit µm)
    blk1: Block "Bioreactor" | base = center; size = {200, 80, 100}
    blk2: Block "Electrode_1" | pos = {-105, 0, 0}; base = center; size = {10, 80, 100}
    blk3: Block "Electrode_2" | pos = {105, 0, 0}; base = center; size = {10, 80, 100}
    pt1: Point "Pt_bioreactor"
    pt2: Point "Pt_electrode_1" | p = {-105, , 0}
    pt3: Point "Pt_electrode_2" | p = {105, , 0}
    fin: Finalize "Constituer une union"

Materials
  mat1: Common "Electrode" on no domains
    def "Basique"
      electricconductivity = 1e7
      relpermittivity = 1
  mat2: Common "Culture_medium" on domains 2
    def "Basique"
      electricconductivity = 1e-5
      relpermittivity = 1

Physics
  ec: ConductiveMedia "Courants électriques" on all domains
    dependent variable V
    cucn1: CurrentConservation "Conservation du courant 1" (default)
    ein1: ElectricInsulation "Isolation électrique 1" (default)
    init1: init "Valeurs initiales 1" (default)
    gnd1: Ground "Masse 1" on boundaries 11
    term1: Terminal on boundaries 6 | TerminalType = Voltage; V0 = 0.025

Mesh
  mesh1 "Maillage 1" (physics-controlled)
    size: MeshSizeDefault "Taille" | hauto = 3

Studies
  std1 "Etude 1"
    freq: Frequency "Domaine fréquentiel" | plist = 10^{range(log10(1000),1/10,log10(100000))}

Solver configurations
  sol1 "Solution 1" (study std1)
    v1: Variables "Variables dépendantes 1"
    s1: Stationary "Solveur stationnaire 1"
      p1: Parametric "Paramétrique 1"
        pname = freq
        plistarr = 10^{range(log10(1000),1/10,log10(100000))}
        punit = Hz
        pcontinuationmode = no
      fc1: FullyCoupled "Couplage fort 1"
      i1: Iterative "Itératif 1" | linsolver = bicgstab; nlinnormuse = on
        mg1: Multigrid "Multigrilles 1"

Datasets
  dset1: Solution | solution = sol1
  cpl3: CutPlane "Plan de coupe 3" | data = dset1; quickplane = xy

Plots
  pg6: PlotGroup2D "Groupe de graphiques 2D 6" | data = cpl3
    surf1: Surface | data = cpl3; expr = V
      hght1: Height "Elévation 1" | heightdata = expr; expr = V
  pg7: PlotGroup1D "Groupe de graphiques 1D 7" | data = none; xlabel = freq; ylabel = impedance
    glob1: Global | data = dset1; expr = abs(1/ec.Y11); unit = Ω; xdata = expr; xdataexpr = freq
  pg8: PlotGroup3D "Groupe de graphiques 3D 8" | data = dset1
    vol1: Volume | expr = V

Exports
  data1: Data "Données 1"
    data = cpl3
    expr = V
    unit = V
    descr = Potentiel électrique
    filename = C:\Users\Vincent Senez\BIOCAD-2_vsnz\Untitled.txt